# Worksheet setting: ORIGIN = 1
# обоснование типа производства и вида поточной линии
r := 0.48
n_wdays := 22
n_wshift := 2
work_t := 8
repair_loss := 0.97
m := 9
t := [1.92; 1.40; 0.48; 0.48; 0.56; 1.48; 0.48; 1.44; 0.40]
ratio := t/r = [4; 2.91667; 1; 1; 1.16667; 3.08333; 1; 3; 0.833333]
N := n_wdays*n_wshift*work_t*60*repair_loss/r = 42680
C_p := sum(t[i], i = 1 .. m)/r = 18
K_sp := m/C_p = 0.5
K_m := sum(t[i], i = 1 .. m)/(m*r) = 2
# проверка кратности норм времени такту с допустимым отклонением(5-7%) ?
r*0.05 = 0.024
r*0.07 = 0.0336
# рассчёт календарно-плановых нормативов и построение стандарт-плана
solve block
    # guess values
    k := 1.0
    # constraints
    ratio[2]/k == 3
    # solver
    find(k) = 0.972222
end solve block
solve block
    # guess values
    k := 1.0
    # constraints
    ratio[5]/k == 1
    # solver
    find(k) = 1.16667
end solve block
solve block
    # guess values
    k := 1.0
    # constraints
    ratio[6]/k == 3
    # solver
    find(k) = 1.02778
end solve block
solve block
    # guess values
    k := 1.0
    # constraints
    ratio[9]/k == 1
    # solver
    find(k) = 0.833333
end solve block
# норма штучного времени на данной i-ой операции с учётом коэффициента выполнения норм времени, мин
t' := [t[1]; t[2]; t[3]; t[4]; t[5]/1.167; t[6]/1.028; t[7]; t[8]; t[9]]
t' = [1.92; 1.4; 0.48; 0.48; 0.479863; 1.43969; 0.48; 1.44; 0.4]
# кол-во раб мест по операциям | по всей линии
i := 1 .. m
C_p[i] := t'[i]/r = [4; 2.91667; 1; 1; 0.999714; 2.99935; 1; 3; 0.833333]
sum(C_p[i], i = 1 .. m) = 17.7491
# Если нормы времени на операциях равны или кратны такту, то при расчёте
# количества рабочих мест получаем целые числа. В случае если процесс не пол-
# ностью синхронизирован, то полученное по расчёту число единиц оборудова-
# ния (рабочих мест) после соответственного анализа округляется до целого чис-
# ла в большую или меньшую сторону (Спр).
C_np[i] := round(C_p[i]) = [4; 3; 1; 1; 1; 3; 1; 3; 1]
C_l := sum(C_np[i], i = 1 .. m) = 18
# Коэффициент загрузки рабочих мест (оборудования) на каждой i-й операции
K_з[i] := C_p[i]/C_np[i] = [1; 0.972222; 1; 1; 0.999714; 0.999784; 1; 1; 0.833333]
K_з.ср := sum(C_p[i], i = 1 .. m)/sum(C_np[i], i = 1 .. m) = 0.986059
# расчётное кол-во единиц оборудования | принятое кол-во единиц оборудования
sum(C_p) = 17.7491
sum(C_np) = 18
C_np = [4; 3; 1; 1; 1; 3; 1; 3; 1]
C_np := [1; 3; 3; 1; 1; 1; 3; 1; 3; 1]
m := 10
i := 1 .. m
# скорость движения конвейера
l_np := 0.7
V := l_np/r = 1.45833
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# период конвейера ( least common multiple)
П := lcm(C_np) = 3
# рабочая длинна ленты распределённого конвейера
L_p := sum(C_np*l_np) = 12.6
L_p := sum(C_np)*l_np = 12.6
# полная длинна конвейера
D := 0.3
L_n := 2*L_p + π*D = 26.1425
K := L_n/(П*l_np) = 12.4488
K := ceil(K) = 13
K*П*l_np = 27.3
# заделы
# резервный задел
Z_tech := C_l = 18
Z_tr := C_l - 1 = 17
Z_rez := 0.05*N/(2*22) = 48.5
Z_0 := Z_tech + Z_tr + Z_rez = 83.5
# величина незавершённого производства
H_в := Z_0*sum(t')/(2*60) = 5.92819
# величина незавершённого производства в денежном выражении
H_З := Z_0*C_z  # error: Эта переменная не определена. Проверьте правильность установки обозначения.
# темп поточной линии
ρ := 1/r*60 = 125
# часовая производительность конвейера
Q := 1
q_r := ρ*Q = 125
# мощность потребляемая конвейером
Q_k := 6
W := 1.2*(0.16*L_n*V*Q_k/36 + 0.16*L_n*q_r/270) = 3.54376
L_n = 26.1425
Q_k = 6
V = 1.45833
q_r = 125
P_уст.к := 0.736*W = 2.60821
# рассчёт производственной площади
S_verst := 1200*700*18*3.5 = 52920000
S_conv := 26385*300*1 = 7915500
S_sum := S_verst + S_conv = 60835500
